s1 := 0.2
s2 := 0.5
ψ(x) := (x + 2 + s1)*(x - 2 - s2)
φ(x) := (x^4 + 2)/(1 + x^2)
y(x) := φ(x)/ψ(x)
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# 1. Область существования функции y(x):
(x + 2 + s1)*(x - 2 - s2) ≠ 0
x ≠ -2.2  # и
x ≠ 2.5
g(x) := (x + 2 + s1)*(x - 2 - s2)
x := 2
root(g(x), x) = 2.5
x := -2
root(g(x), x) = -2.2
# 2. Симметрия графика
# f(x)=f(-x), то функция f(x) - чётная
# f(x)=-f(-x), то функция f(x) - нечётная
# иначе функция f(x) - общего вида
y(t) + y(-t) simplify → (2e23*t^6 - 1.1e24*t^4 + 4e23*t^2 - 2.2e24)/(1e23*t^6 - 1.009e24*t^4 + 1.916e24*t^2 + 3.025e24)
# y(x) - общего вида.
# 3. Точки разрыва и промежутки непрерывности.
x ≠ -2.2  # и
x ≠ 2.5  # - точки разрыва 2 рода.
limit(y(x), x → 2.5+) → ∞
limit(y(x), x → -2.2+) → -∞
limit(y(x), x → 2.5-) → -∞
limit(y(x), x → -2.2-) → ∞
limit(y(x), x → -∞) → 1
limit(y(x), x → ∞) → 1
# 4. Определить нули функции и области постоянства знаков функции
a(x) := x^4 + 2
x^4 + 2 > 0
# Нулей функции нет.
Given
y(x) > 0
Find(x) → -∞ < x < -2.2 or 2.5 < x < ∞
Given
y(x) < 0
Find(x) → -2.2 < x < 2.5
5, 6, 7.
y(x) := φ(x)/ψ(x)
dy(x) := d/dx(y(x)) → 4*x^3/((x + 2.2)*(x - 2.5)*(x^2 + 1)) - (x^4 + 2)/((x + 2.2)^2*(x - 2.5)*(x^2 + 1)) - (x^4 + 2)/((x + 2.2)*(x - 2.5)^2*(x^2 + 1)) - 2*x*(x^4 + 2)/((x + 2.2)*(x - 2.5)*(x^2 + 1)^2)
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x := 0
root(dy(x), x) = -0.0335083  # - точка  максимума y(x)
# y=kx+b | - наклонная асимптота
# k=
limit(y(x)/x, x → ∞) → 0
# b =
limit(y(x) - k*x, x → ∞) → 1 - k*∞
