f21(x) := sin(x)^4 + cos(x)^4
f22(x) := sin(x)*cos(3*x)
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x := 0
a := root(f21(x) - 1, x) = 0
x := 2
b := root(f21(x) - 1, x) = 1.57081
t := b - a = 1.57081
f21(x) - f21(x + t) simplify → 1.55211882386e-5
x := 0
a := root(f22(x), x) = 0
x := 2
b := root(f22(x), x) = -0.523599
t := a - b = 0.523599
