s1 := 0.2
s2 := 0.5
ls := -10
rs := 10
ψ(x) := (x + 2 + s1)*(x - 2 - s2)
φ(x) := (x^4 + 2)/(1 + x^2)
y(x) := φ(x)/ψ(x)
dy(x) := d/dx(y(x))
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x := ls .. -2 - s1
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x := -2 - s1 .. 2 + s2
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x := 2 + s2 .. rs
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Given
x := 0
d/dx(y(x)) == 0
Find(x) = -0.0335083
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limit(y(x), x → -∞)
limit(y(x), x → □ + ∞)
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