f(x) := nthroot(x^2*(x + 3), 3)
d^2/dx^2(f(x)) → nthroot(x^2*(x + 3), 3)*(6*x + 6)/(3*x^2*(x + 3)) - 2*nthroot(x^2*(x + 3), 3)*(2*x*(x + 3) + x^2)/(3*x^3*(x + 3)) - nthroot(x^2*(x + 3), 3)*(2*x*(x + 3) + x^2)/(3*x^2*(x + 3)^2) + nthroot(x^2*(x + 3), 3)*(2*x*(x + 3) + x^2)^2/(9*x^4*(x + 3)^2)
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f2(x) := nthroot(x^2*(x + 3), 3)*(6*x + 6)/(3*x^2*(x + 3)) - 2*nthroot(x^2*(x + 3), 3)*(2*x*(x + 3) + x^2)/(3*x^3*(x + 3)) - nthroot(x^2*(x + 3), 3)*(2*x*(x + 3) + x^2)/(3*x^2*(x + 3)^2) + nthroot(x^2*(x + 3), 3)*(2*x*(x + 3) + x^2)^2/(9*x^4*(x + 3)^2) simplify → -2*nthroot(x^2*(x + 3), 3)/(x^2*(x + 3)^2)  # error: Эта переменная не определена.
f2(x) solve →  # error: Решение не было найдено.
f(1) = 1.5874
