f(x) :=
    0 if |x| > 2
    sqrt(4 - x^2) otherwise
g(x) := if(|x| > 2, 0, sqrt(4 - x^2))
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f1(x) := x^2 - 1
f2(x) :=
    f1(x) if -2 ≤ x ≤ -π/3
    (-f1(x)) if -π/3 ≤ x ≤ 0
    f1(x)^2 if 0 ≤ x < -π/3
    x otherwise
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