# Контрольная работа по Компьютерному практикуму по  математике  1,
# 2 модуль, декабрь 2015.
# 8,1,13,12,16,3,1;15,1,20,1,13,11,33
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s1 := 8 + 1 + 13 + 12 + 16 + 3 + 1 = 54
s2 := 15 + 1 + 20 + 1 + 13 + 11 + 33 = 94
№ := 1 + mod(s1 + s2, 38) = 35
ψ(x) := (x + 1 + 0.54)*(x - 1 - 0.94)
φ(x) := e^(-x^2)*((e^x - e^(-x))/2 - x)
y(x) := φ(x)/ψ(x)
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# 4. Нули функции и области постоянства знака
Given
y(x) > 0
Find(x)  # error: Решение не было найдено.
Given
y(x) < 0
Find(x)  # error
