# Разложение в степенной ряд Тейлора
# 1) Разложение в точке х=0
f(x) series → f(0) + x*{
    x0 ← 0
    d/dx0(f(x0))
} + x^2*{
    x0 ← 0
    d^2/dx0^2(f(x0))
}/2 + x^3*{
    x0 ← 0
    d^3/dx0^3(f(x0))
}/6 + x^4*{
    x0 ← 0
    d^4/dx0^4(f(x0))
}/24 + x^5*{
    x0 ← 0
    d^5/dx0^5(f(x0))
}/120
# 2) разложение в точке x0
F(x) series, x == x0 → F(x0) + d/dx0(F(x0))*(x - x0) + d^2/dx0^2(F(x0))*(x - x0)^2/2 + d^3/dx0^3(F(x0))*(x - x0)^3/6 + d^4/dx0^4(F(x0))*(x - x0)^4/24 + d^5/dx0^5(F(x0))*(x - x0)^5/120
sin(x) series → x - x^3/6 + x^5/120
exp(x) series, x == 1, 7 → e + e*(x - 1) + e*(x - 1)^2/2 + e*(x - 1)^3/6 + e*(x - 1)^4/24 + e*(x - 1)^5/120 + e*(x - 1)^6/720
f2exp(x) := e + e*(x - 1)
f3exp(x) := e + e*(x - 1) + e*(x - 1)^2/2
f5exp(x) := e + e*(x - 1) + e*(x - 1)^2/2 + e*(x - 1)^3/6 + e*(x - 1)^4/24
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exp(1.1) → 3.00416602395
f2exp(1.1) - exp(1.1) = -0.014056
f3exp(1.1) - exp(1.1) = -0.000464603
f5exp(1.1) - exp(1.1) = -2.30353e-7
