# Нахождение асимптоты
y1(x) := (x^3 - 1)/(x - 2)
# 1 способ | и снизу и сверху одинаквая степень
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g1(x) := y1(x)/x^2 simplify → (x^3 - 1)/(x^2*(x - 2))
g1(∞) → undefined  # коэффициенты
g1(∞) := limit(g1(x), x → ∞) → 1
# 2 способ
# Разложение в ряд Тейлора в точке x=∞
g2(t) := (x^3 - 1)/(x^2*(x - 2)) substitute, x == 1/t → (t^3 - 1)/(2*t - 1)  # замена
g3(t) := (t^3 - 1)/(2*t - 1) series, t → 1 + 2*t + 4*t^2 + 7*t^3 + 14*t^4 + 28*t^5
assym1(x) := x^2*g3(t) substitute, t == 1/x → (x^5 + 2*x^4 + 4*x^3 + 7*x^2 + 14*x + 28)/x^3
assym2(x) := (x^5 + 2*x^4 + 4*x^3 + 7*x^2 + 14*x + 28)/x^3 expand → 2*x + 7/x + 14/x^2 + x^2 + 28/x^3 + 4
assym3(x) := x^2 + 2*x + 4 + 7/x + 14/x^2 + 28/x^3
x^2 + 2*x + 4
