f(x, y) := x^2 + x - y - 1
# [component: inputs f]
dfx(x, y) := d/dx(f(x, y)) → 2*x + 1
dfy(x, y) := d/dy(f(x, y)) → -1
dyx(x, y) := -1*dfx(x, y)/dfy(x, y) → 2*x + 1  # это y' от x
dyx(1, 1) = 3
G(x, y) := y - dyx(x, y)
# [component: inputs G]
