m := [0, 1; 5, 3; 6, -2]
v := [13; 3; 50]
b := [0, 1, -1; 1, -1, 1]
cols(m) = 2
min(m) = -2
rows(m) = 3
max(m) = 6
length(v) = 3
last(v) = 2
a := [1, -1, 1; -1, -1, 1]
z := 2
u := [0; 1; -1]
# Умножение матрицы на скаляр
m*z = [0, 2; 10, 6; 12, -4]
# Скалярное произведение
u*v = -47
# Матричное умножение
m*b = [1, -1, 1; 3, 2, -2; -2, 8, -8]  # последовательное сложение произвеений соответствующего элемента из строки на элемент из другой матрицы строки
# Умножение матрицы на вектор
b*v = [-47; 60]
v*b =  # error: Размерности массива не совпадают.  # нельзя
# Деление матрицы на скаляр
m/z = [0, 0.5; 2.5, 1.5; 3, -1]
# Сложение матриц или векторов
a + b = [1, 0, 0; 0, -2, 2]
u + v = [13; 4; 49]
# Сложение матрицы и скаляра
c := [1, -1, 1; 3, 2, -2; -2, 8, -8]
m + z = [2, 3; 7, 5; 8, 0]
# Степень матрицы
c^2 = [-4, 5, -5; 13, -15, 15; 38, -46, 46]
# Обратная матрица
c^-1 = [0, 0, 0; 9.0072e15, -1.93011e15, 1.60843e15; 9.0072e15, -1.93011e15, 1.60843e15]
u = [0; 1; -1]
v = [13; 3; 50]
m = [0, 1; 5, 3; 6, -2]
c := [1, 2; 3, 4]
d := [2, 8, 3; 7, 1, 9; 5, 6, 4]
|u| = 1.41421
# одно и то же
sqrt(u*u) = 1.41421
|c| = -2
# детерминант, он же определитель
|d| = 147  # игра в определитель
u*v = -47
v := [13; 3; 50]
identity(3) = [1, 0, 0; 0, 1, 0; 0, 0, 1]  # единичная матрица
A := [1, 4, 3; 3, 2, 2; 3, 3, 1]  # действительная часть
Re(A) = [1, 4, 3; 3, 2, 2; 3, 3, 1]
diag(A) = [1; 2; 1]
diag(v) = [13, 0, 0; 0, 3, 0; 0, 0, 50]
rref(A) = [1, 0, 0; 0, 1, 0; 0, 0, 1]  # ступенчая матрица
Im(A) = [0, 0, 0; 0, 0, 0; 0, 0, 0]
rank(A) = 3  # ранк вещественной матрицы
tr(A) = 4
# след вещественной матрицы
norm1(A) = 9
# число независимых строк
augment
stack
submatrix(A, 1, 2, 1, 2) = [2, 2; 3, 1]  # выделяем первую строку вторую строку первый столбец второй столбец
# собственной значение матрицы
