# Детерминант
L := [a, 2, 3; 3, 6, 1; 4, 7, 8]  # error: Эта переменная не определена.
det(L(a)) - □
a0 - □
det(A(a0)) - 0
# то есть строки линейно зависимы
A(a) := [a, 3, 6; 2, 4, 8; 9, 3, 6]
a1 := 0
Given
|A| == 0
a := Find(a1)  # error: Эта переменная не определена.
a := □  # error: Пустой местозаполнитель.
