m := [1, 2, 3, 4; 4, 3, 2, 1; 4, 3, 2, 2; 3, 4, 5, 6]
rank(m) = 3
|m - λ*identity(4)| → λ^4 - 12*λ^3 - 5*λ^2 + 3*λ
λ^4 - 12*λ^3 - 5*λ^2 + 3*λ == 0 solve → [
    0;
    (4*(145/2 + sqrt(83499)*1i/18)^(1/3) + (269921/54 + 145i*sqrt(83499)/18)^(1/3) + 53/3)/(145/2 + sqrt(83499)*1i/18)^(1/3);
    -(53 + 3*(269921/54 + 145i*sqrt(83499)/18)^(1/3) - 24*(145/2 + sqrt(83499)*1i/18)^(1/3) - 53i*sqrt(3) + 3i*sqrt(3)*(269921/54 + 145i*sqrt(83499)/18)^(1/3))/(6*(145/2 + sqrt(83499)*1i/18)^(1/3));
    -(53 + 3*(269921/54 + 145i*sqrt(83499)/18)^(1/3) - 24*(145/2 + sqrt(83499)*1i/18)^(1/3) - 3i*sqrt(3)*(269921/54 + 145i*sqrt(83499)/18)^(1/3) + 53i*sqrt(3))/(6*(145/2 + sqrt(83499)*1i/18)^(1/3))
] = [0; 12.3842; 0.33625; -0.72043]
