a11 := 1
a12 := -1
a21 := 2
a22 := 3
b1 := 4
b2 := 5
a11*x1 + a12*x2 == b1
A := [a11, a12; a21, a22]
z := [x1; x2]  # error: Эта переменная не определена.
b := [b1; b2]
a21*x1 + a22*x2 == b2
# Обратная матрица | Формула Кремора
# LSOLVE
A^-1*A*x == b*A^-1
|A| = 5  # не равен нулю
z_j == |M(j)|/|A|
|A| = 5  # не равен нулю
|A| = 5  # не равен нулю
x_1 := lsolve(A, b)
x_2 := A^-1*b
x_1 = [3.4; -0.6]
x_3_1 := det([b1, a12; b2, a22])/|A|
x_3_1 = 3.4
x_2 = [3.4; -0.6]
# Метод Гаусса
# Вводим увеличенную(расширенную) матрицу
x_3_2 := det([a11, b1; a21, b2])/|A|
x_3_2 = -0.6
Ar := augment(A, b) = [1, -1, 4; 2, 3, 5]
# домножаем первое уравнение на a21/a11, вычитаем это из второго
Ag := rref(Ar) = [1, 0, 3.4; 0, 1, -0.6]
# чтобы отсоединить столбец
x_4 := submatrix(Ag, 0, 1, 2, 2) = [3.4; -0.6]
# строки столбцы
