# 1. Детерминант и ранг
# 2. Методы решения систем линейных алгебраических уравнений (СЛАУ)
# Точные методы:
# - lsolve (lu-разложение)
# - матричный (обратная мтарица)
# - формула крамера
# - метод гаусса
# Приближенные методы
# -Given-find
# -метод простых итераций
# -метод Якобы
# - метод Зейделя
a11*x + a12*y == b1
A := [a11, a12; a21, a22]  # error: Эта переменная не определена.
z := [x; y]  # error: Эта переменная не определена.
b := [b1; b2]  # error: Эта переменная не определена.
a21*x + a22*y == b2
A*z == b
# Метод Крамера: x= detM/detA, где det A=a11*a22-a12*a21, Mx=(b1 a12), detMx=b1*a22-b2*a12,My=(a11 b1), det My=a11*b2-b1*a21
# (b2 a22) | (a21 b2)
# таким образом x= _______________ | b1*a22-b2*a12
# a11*a22-a12*a21
z_j == |M(j)|/|A|
x == det([b1, a12; b2, a22])/det([a11, a12; a21, a22])
a := 2/3
a*x + 2*y == 3
2*x + 6*y == 3
detA := det([a, 2; 2, 6])
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detA = 0
x := det([3, 2; 3, 6])/det([a, 2; 2, 6])  # error: Деление на ноль.
x =  # error: Эта переменная не определена.
y := |[a, 3; 2, 3]/[a, 2; 2, 6]|  # error: При вычислении выражения обнаружена сингулярность.
y =  # error
a1 := 1
a2 := 3
x1 := [1; 0; -1]
x2 := [2; 3; 4]
x3 := [-1; 2; 5]
a3 := -1
x := a1*x1 + a2*x2 + a3*x3  # Ранг - количество линейно независимых строк/столбцов(не равных нулю)
x = [8; 7; 6]
