# Коммутатация, коммутирующие матрицы
A := [1, 2, 5; 2, 3, 4; 1, 6, 5]
B := [8, 2, 4; 1, 7, 7; 3, 5, 9]
E := [1, 0, 0; 0, 1, 0; 0, 0, 1]
|A| = 24
|B| = 184
|E| = 1
# Первое
A*B - B*A = [9, -5, -5; 9, -20, -3; 7, -6, 11]
# Второе
# произведение коммутативно в случае умножения с единичной матрицей: AI = IA
A*E - E*A = [0, 0, 0; 0, 0, 0; 0, 0, 0]
# A*E=E*A
# Третье
A*A^-1 - A^-1*A = [1.11022e-16, -2.22045e-16, 5.55112e-17; 0, -1.11022e-16, 8.32667e-17; -2.08167e-17, 0, 0]
