A := [1, 2, 3, 4; 5, 6, 7, u; 9, 10, v, 12; 13, 14, 15, 16]
rank(A) =  # error: Эта переменная не определена.
# получить ранк = 2 и 3
# дополнить вектором
# ранк = 4
|A| → 12*u*v - 96*v - 132*u + 1056
# ранг 2 | ранг 3 | ранг 4
A2 := [1, 2, 3, 4; 5, 6, 7, 8; 9, 10, 11, 12; 13, 14, 15, 16]
A3 := [1, 2, 3, 4; 5, 6, 7, 8; 9, 10, 9, 12; 13, 14, 15, 16]
A4 := [1, 2, 3, 4; 5, 6, 7, 123; 9, 10, 9, 12; 13, 14, 15, 16]
b1 := 1
b2 := 3
b3 := 2
rank(A2) = 2
rank(A4) = 4
rank(A3) = 3
b4 := 4
detA4 := |A4| = -2760
detA2 := |A2| = 0
detA3 := |A3| = -2.13163e-14
b := [b1; b2; b3; b4]
a11 := 1
a21 := 5
# 1 способ - способ маткада
# Метод №4
a31 := 9
a41 := 13
# Метод №2
# Метод№3
# метод гаусса
a12 := 2
a22 := 6
a32 := 10
detA := |A4|  # обратная матрица  # формула Крамера
a42 := 14
a13 := 3
a23 := 7
a33 := 9
detA = -2760
A*x_2 == b
z_j == |M(j)|/|A|
Ar := augment(A4, b)
a43 := 15
a14 := 4
a24 := 123
x_2 := A4^-1*b
a34 := 12
x_1 := lsolve(A4, b)
Ar = [1, 2, 3, 4, 1; 5, 6, 7, 123, 3; 9, 10, 9, 12, 2; 13, 14, 15, 16, 4]
a44 := 16
Ag := rref(Ar)
x_3_1 := det([b1, a12, a13, a14; b2, a22, a23, a24; b3, a32, a33, a34; b4, a42, a43, a44])/|A4|
x_1 = [0.0173913; -0.276087; 0.5; 0.00869565]
Ag = [1, 0, 0, 0, 0.0173913; 0, 1, 0, 0, -0.276087; 0, 0, 1, 0, 0.5; 0, 0, 0, 1, 0.00869565]  # метод
5
Given
x_2 = [0.0173913; -0.276087; 0.5; 0.00869565]
x_4 := submatrix(Ag, 0, 3, 4, 4)
a11*x1 + a12*x2 + a13*x3 + a14*x4 == b1
a21*x1 + a22*x2 + a23*x3 + a24*x4 == b2
x_3_2 := det([a11, b1, a13, a14; a21, b2, a23, a24; a31, b3, a33, a34; a41, b4, a43, a44])/|A4|
x_4 = [0.0173913; -0.276087; 0.5; 0.00869565]
a31*x1 + a32*x2 + a33*x3 + a34*x4 == b3
a41*x1 + a42*x2 + a43*x3 + a44*x4 == b4
x_3_3 := det([a11, a12, b1, a14; a21, a22, b2, a24; a31, a32, b3, a34; a41, a42, b4, a44])/|A4|
Find(x1, x2, x3, x4) → [2/115; -127/460; 1/2; 1/115]
x_3_4 := det([a11, a12, a13, b1; a21, a22, a23, b2; a31, a32, a33, b3; a41, a42, a43, b4])/|A4|
x_3_1 = 0.0173913
x_3_2 = -0.276087
x_3_3 = 0.5
x_3_4 = 0.00869565
# ранг 3
x1 + 2*x2 + 3*x3 + 4*x4 == 1
A3 := [1, 2, 3, 4; 5, 6, 7, 8; 9, 10, 9, 12; 13, 14, 15, 16]
b := [1; 1; 1; 1]
5*x1 + 6*x2 + 7*x3 + 8*x4 == 1
9*x1 + 10*x2 + 9*x3 + 12*x4 == 1
13*x1 + 14*x2 + 15*x3 + 16*x4 == 1
rank(A3) = 3
detA3 := |A3| = -2.13163e-14
# 1 ) решение однородного уравнения Ax=0_vect
x1 + 2*x2 + 3*x3 + 4*x4 == 0
5*x1 + 6*x2 + 7*x3 + 8*x4 == 0
[x1; x2; x3; x4] := C1*[2; -3; 1.776*10^-15; 1]
9*x1 + 10*x2 + 9*x3 + 12*x4 == 0
x1 + 2*x2 + 3*x3 == -(4*x4)
5*x1 + 6*x2 + 7*x3 == -(8*x4)
9*x1 + 10*x2 + 9*x3 == -(12*x4)
A_odn := [1, 2, 3; 5, 6, 7; 9, 10, 9]
C1 := 1  # Меняем переменые на 0 и 1
b_odn := [-4*C1; -8*C1; -12*C1]
lsolve(A_odn, b_odn) = [2; -3; 0]
# 2 ) решение неоднородного уравнения
A3 := [1, 2, 3, 4; 5, 6, 7, 8; 9, 10, 9, 12; 13, 14, 15, 16]
b := [1; 1; 1; 1]
x1 + 2*x2 + 3*x3 + 4*x4 == 1
5*x1 + 6*x2 + 7*x3 + 8*x4 == 1
9*x1 + 10*x2 + 9*x3 + 12*x4 == 1
13*x1 + 14*x2 + 15*x3 + 16*x4 == 1
x1 + 2*x2 + 3*x3 + 4*x4 == 1
5*x1 + 6*x2 + 7*x3 + 8*x4 == 1
9*x1 + 10*x2 + 9*x3 + 12*x4 == 1
x1 + 2*x2 + 3*x3 == 1
5*x1 + 6*x2 + 7*x3 == 1
9*x1 + 10*x2 + 9*x3 == 1
A_neodn := [1, 2, 3; 5, 6, 7; 9, 10, 9]
b_neodn := [1; 1; 1]
lsolve(A_neodn, b_neodn) = [-1; 1; 0]
x_neodn_ch := [-1; 1; 0; 0]
x_odn_obsh := C_1*[2; -3; 1.776*10^-15; 1]
x_obsh := x_odn_obsh + x_neodn_ch
x_obsh := C_1*[2; -3; 1.776*10^-15; 1] + [-1; 1; 0; 0]
C_1 := 2
x_obsh := 2*[2; -3; 1.776*10^-15; 1] + [-1; 1; 0; 0]
x_obsh = [3; -5; 0; 2]
A3*x_obsh - b = [1.06581e-14; 2.4869e-14; 3.19744e-14; 5.32907e-14]
# ранг 2
A2 := [1, 2, 3, 4; 5, 6, 7, 8; 9, 10, 11, 12; 13, 14, 15, 16]
b := [1; 1; 1; 1]
x1 + 2*x2 + 3*x3 + 4*x4 == 1
5*x1 + 6*x2 + 7*x3 + 8*x4 == 1
rank(A2) = 2
detA2 := |A2| = 0
9*x1 + 10*x2 + 11*x3 + 12*x4 == 1
# 1 ) решение однородного уравнения Ax=0_vect
13*x1 + 14*x2 + 15*x3 + 16*x4 == 1
x1 + 2*x2 + 3*x3 + 4*x4 == 0
5*x1 + 6*x2 + 7*x3 + 8*x4 == 0
[x1; x2; x3; x4] := C1*[1; -2; 1; 0] + C2*[2; -3; 0; 1]
x1 + 2*x2 == -(3*x3 + 4*x4)
5*x1 + 6*x2 == -(7*x3 + 8*x4)
A_odn := [1, 2; 5, 6]
C2 := 0  # Меняем переменые на 0 и 1
C1 := 1
b_odn := [-3*C1 - 4*C2; -7*C1 - 8*C2]
lsolve(A_odn, b_odn) = [1; -2]
# 2 ) решение неоднородного уравнения
x1 + 2*x2 + 3*x3 + 4*x4 == 1
A2 := [1, 2, 3, 4; 5, 6, 7, 8; 9, 10, 11, 12; 13, 14, 15, 16]
b := [1; 1; 1; 1]
5*x1 + 6*x2 + 7*x3 + 8*x4 == 1
9*x1 + 10*x2 + 11*x3 + 12*x4 == 1
13*x1 + 14*x2 + 15*x3 + 16*x4 == 1
rank(A2) = 2
detA2 := |A2| = 0
x1 + 2*x2 + 3*x3 + 4*x4 == 1
5*x1 + 6*x2 + 7*x3 + 8*x4 == 1
x1 + 2*x2 == 1
5*x1 + 6*x2 == 1
b_neodn := [1; 1]
A_neodn := [1, 2; 5, 6]
lsolve(A_neodn, b_neodn) = [-1; 1]
x_neodn_ch := [-1; 1; 0; 0]
x_odn_obsh := C_1*[1; -2; 1; 0] + C_2*[2; -3; 0; 1]
x_obsh := x_odn_obsh + x_neodn_ch
x_obsh := C_1*[1; -2; 1; 0] + C_2*[2; -3; 0; 1] + [-1; 1; 0; 0]
C_1 := 2
C_2 := 2
x_obsh := 2*[1; -2; 1; 0] + 2*[2; -3; 0; 1] + [-1; 1; 0; 0]
x_obsh = [5; -9; 2; 2]
A2*x_obsh - b = [0; 0; 0; 0]
