A := [1, 2, 3, 4; 5, 6, 7, 8; 9, 10, 11, 12; 13, 14, 15, 16]
r := [1; 1; 1; 1]
rank(A) = 2
|A| = 0
# Решение однородного уравнения Ax=0_vect
1*x1 + 2*x2 + 3*x3 + 4*x4 == 0
5*x1 + 6*x2 + 7*x3 + 8*x4 == 0
9*x1 + 10*x2 + 11*x3 + 12*x4 == 0
13*x1 + 14*x2 + 15*x3 + 16*x4 == 0
# Так как два независимых, то берем 2 уравнения
1*x1 + 2*x2 + 3*x3 + 4*x4 == 0
5*x1 + 6*x2 + 7*x3 + 8*x4 == 0
# Превратим в более удобный вид через параметры х3 х4
# Перенос вправо
1*x1 + 2*x2 == -3*x3 - 4*x4
5*x1 + 6*x2 == -7*x3 - 8*x4
# просто левые коэффициенты | то что справа
b_odn := [-3*x3 - 4*x4; -7*x3 - 8*x4]  # error: Эта переменная не определена.
A_odn := [1, 2; 5, 6]
# x3 становится С1 а х4 становится С2
b_odn := [-3*C1 - 4*C2; -7*C1 - 8*C2]  # error: Эта переменная не определена.
C1 := 1
C2 := 0
[x1; x2; x3; x4] := C1*[1; -2; 1; 0] + C2*[2; -3; 0; 1]
b_odn := [-3; -7]
lsolve(A_odn, b_odn) = [1; -2]
