1*x1 + 2*x2 + 3*x3 + 4*x4 == 1
5*x1 + 6*x2 + 7*x3 + 8*x4 == 1
A := [1, 2, 3, 4; 5, 6, 7, 8; 9, 10, 11, 12; 13, 14, 15, 16]
r := [1; 1; 1; 1]
9*x1 + 10*x2 + 11*x3 + 12*x4 == 1
13*x1 + 14*x2 + 15*x3 + 16*x4 == 1
|A| = 0
rank(A) = 2
1*x1 + 2*x2 + 3*x3 + 4*x4 == 1
5*x1 + 6*x2 + 7*x3 + 8*x4 == 1
x3 := 0
x4 := 0
1*x1 + 2*x2 == 1
5*x1 + 6*x2 == 1
A_neodn := [1, 2; 5, 6]
b_neodn := [1; 1]
lsolve(A_neodn, b_neodn) = [-1; 1]
x_neodn_ch := [-1; 1; 0; 0]
x_obsh := x_odn_obsh + x_neodn_ch  # error: Эта переменная не определена.
x_obsh := C1*[1; -2; 1; 0] + C2*[2; -3; 0; 1] + [-1; 1; 0; 0]  # error: Эта переменная не определена.
