A := [1, 2, 3, 4; 5, 6, 7, 1; 9, 10, 2, 12; 13, 14, 15, 16]
r := [1; 2; 3; 4]
rank(A) = 4
|A| = 756
# Обратная матрица
A^-1*A*x == r*A^-1
x_2 := A^-1*r
x_2 = [-0.5; 0.75; 0; 0]
# Формула Крамера
z_j == |M(j)|/|A|
x_3_2 := det([1, 1, 3, 4; 5, 2, 7, 1; 9, 3, 2, 12; 13, 4, 15, 16])/|A| = 0.75
x_3_3 := det([1, 2, 1, 4; 5, 6, 2, 1; 9, 10, 3, 12; 13, 14, 4, 16])/|A| = 4.93432e-17
x_3_1 := det([1, 2, 3, 4; 2, 6, 7, 1; 3, 10, 2, 12; 4, 14, 15, 16])/|A| = -0.5
x_3_4 := det([1, 2, 3, 1; 5, 6, 7, 2; 9, 10, 2, 3; 13, 14, 15, 4])/|A| = -3.17207e-17
x_3_1 = -0.5
x_3_2 = 0.75
x_3_3 = 4.93432e-17
x_3_4 = -3.17207e-17
# Метод Гаусса
Ar := augment(A, r) = [1, 2, 3, 4, 1; 5, 6, 7, 1, 2; 9, 10, 2, 12, 3; 13, 14, 15, 16, 4]
Ag := rref(Ar) = [1, 0, 0, 0, -0.5; 0, 1, 0, 0, 0.75; 0, 0, 1, 0, 0; 0, 0, 0, 1, 0]
x_4 := submatrix(Ag, 0, 3, 4, 4) = [-0.5; 0.75; 0; 0]
# Способ lsolve
x_1 := lsolve(A, r)
x_1 = [-0.5; 0.75; 0; 0]
# Given-find
x1 := 0
x2 := 0
x3 := 0
x4 := 0
Given
1*x1 + 2*x2 + 3*x3 + 4*x4 == 1
5*x1 + 6*x2 + 7*x3 + 1*x4 == 2
9*x1 + 10*x2 + 2*x3 + 12*x4 == 3
13*x1 + 14*x2 + 15*x3 + 16*x4 == 4
x_5 := Find(x1, x2, x3, x4)
x_5 = [-0.5; 0.75; 0; 0]
