c := [16, 15, 1, 13; 12, 11, 10, 9; 8, 2, 6, 5; 4, 3, 2, 1]
b := [1; 1; 1; 1]
Given
|c| = -1560
x_1 := lsolve(c, b) = [0.333333; 0; 0; -0.333333]
x_2 := c^-1*b = [0.333333; 0; 0; -0.333333]
# 3 метод
z_j == |M(j)|/|A|
x_3_1 := det([1, 15, 1, 13; 1, 11, 10, 9; 1, 2, 6, 5; 1, 3, 2, 1])/|c| = 0.333333
x_3_2 := det([16, 1, 1, 13; 12, 1, 10, 9; 8, 1, 6, 5; 4, 1, 2, 1])/|c| = 0
x_3_3 := det([16, 15, 1, 13; 12, 11, 1, 9; 8, 2, 1, 5; 4, 3, 1, 1])/|c| = 0
x_3_4 := det([16, 15, 1, 1; 12, 11, 10, 1; 8, 2, 6, 1; 4, 3, 2, 1])/|c| = -0.333333
x_3_1 = 0.333333
x_3_2 = 0
x_3_3 = 0
x_3_4 = -0.333333
Ar := augment(c, b) = [16, 15, 1, 13, 1; 12, 11, 10, 9, 1; 8, 2, 6, 5, 1; 4, 3, 2, 1, 1]
Ag := rref(Ar) = [1, 0, 0, 0, 0.333333; 0, 1, 0, 0, 0; 0, 0, 1, 0, 0; 0, 0, 0, 1, -0.333333]
x_4 := submatrix(Ag, 0, 3, 4, 4) = [0.333333; 0; 0; -0.333333]
