# способ из третьего модуля
A := [0, 1, 2, 3; 1, 3, 3, 4; 2, 3, 4, 5; 3, 4, 5, 6]
L := A - 0*identity(4) → [0, 1, 2, 3; 1, 3, 3, 4; 2, 3, 4, 5; 3, 4, 5, 6]
b := [1; 1; 1; 1]
|A| = -5.32907e-15
tr(A) = 13
rank(L) = 3
|L| = -5.32907e-15
eigenvecs(A) = [
    0.85335, 0.267261, -0.365059, 0.25903;
    0.241643, 0, 0.869922, 0.429936;
    -0.023133, -0.801784, -0.259408, 0.537881;
    -0.461375, 0.534522, -0.206582, 0.677306
]
LL := rref(L) = [1, 0, 0, -0.5; 0, 1, 0, 0; 0, 0, 1, 1.5; 0, 0, 0, 0]
x1 == 0.5*x4
x := [0.5; 0; -1.5; 1]
x2 == 0
eigenvec(A, 13/3 - (2593/27 + sqrt(27)*sqrt(42850)*1i/27)^(1/3)/2 - 199/(18*(2593/27 + sqrt(27)*sqrt(42850)*1i/27)^(1/3)) - sqrt(3)*(199/(9*(2593/27 + sqrt(27)*sqrt(42850)*1i/27)^(1/3)) - (2593/27 + sqrt(27)*sqrt(42850)/27*1i)^(1/3))*1i/2) = [-0.85335; -0.241643; 0.023133; 0.461375]
x3 == -1.5*x4
|x| = 1.87083
x4 == x4
x/|x| = [0.267261; 0; -0.801784; 0.534522]
eigenvec(A, 0) = [-0.267261; 0; 0.801784; -0.534522]
eigenvec(A, 0) = [-0.267261; 0; 0.801784; -0.534522]
eigenvec(A, 13/3 - (2593/27 + sqrt(27)*sqrt(42850)*1i/27)^(1/3)/2 - 199/(18*(2593/27 + sqrt(27)*sqrt(42850)*1i/27)^(1/3)) + sqrt(3)*(199/(9*(2593/27 + sqrt(27)*sqrt(42850)*1i/27)^(1/3)) - (2593/27 + sqrt(27)*sqrt(42850)/27*1i)^(1/3))*1i/2) = [0.365059; -0.869922; 0.259408; 0.206582]
eigenvec(A, 199/(9*(2593/27 + sqrt(27)*sqrt(42850)*1i/27)^(1/3)) + (2593/27 + sqrt(27)*sqrt(42850)*1i/27)^(1/3) + 13/3) = [0.25903; 0.429936; 0.537881; 0.677306]
