A := [0, 1, 2, 3; 1, 3, 3, 4; 2, 3, 4, 5; 3, 4, 5, 6]
|A| = -5.32907e-15
tr(A) = 13
# Собственное значение
eigenvals(A) = [-1.39303; 0; 0.735878; 13.6572]
eigenvals(A) → [
    199/(9*(2593/27 + sqrt(27)*sqrt(42850)*1i/27)^(1/3)) + (2593/27 + sqrt(27)*sqrt(42850)*1i/27)^(1/3) + 13/3;
    13/3 - (2593/27 + sqrt(27)*sqrt(42850)*1i/27)^(1/3)/2 - 199/(18*(2593/27 + sqrt(27)*sqrt(42850)*1i/27)^(1/3)) + sqrt(3)*(199/(9*(2593/27 + sqrt(27)*sqrt(42850)*1i/27)^(1/3)) - (2593/27 + sqrt(27)*sqrt(42850)/27*1i)^(1/3))*1i/2;
    0;
    13/3 - (2593/27 + sqrt(27)*sqrt(42850)*1i/27)^(1/3)/2 - 199/(18*(2593/27 + sqrt(27)*sqrt(42850)*1i/27)^(1/3)) - sqrt(3)*(199/(9*(2593/27 + sqrt(27)*sqrt(42850)*1i/27)^(1/3)) - (2593/27 + sqrt(27)*sqrt(42850)/27*1i)^(1/3))*1i/2
]
A*x == λ*E*x
(A - λ*E)*x == 0
-1.393 + 0 + 0.736 + 13.657 = 13
tr(A) = 13
|A - λ*identity(4)| → λ^4 - 13*λ^3 - 10*λ^2 + 14*λ
-1.393*0*0.736*13.657 = 0
|A| = -5.32907e-15
λ^4 - 13*λ^3 - 10*λ^2 + 14*λ == 0 solve → [
    0;
    (13*(2593/27 + 5i*sqrt(5142)/9)^(1/3)/3 + (5566699/729 + 25930i*sqrt(5142)/243)^(1/3) + 199/9)/(2593/27 + 5i*sqrt(5142)/9)^(1/3);
    -(199 + 9*(5566699/729 + 25930i*sqrt(5142)/243)^(1/3) - 78*(2593/27 + 5i*sqrt(5142)/9)^(1/3) - 199i*sqrt(3) + 9i*sqrt(3)*(5566699/729 + 25930i*sqrt(5142)/243)^(1/3))/(18*(2593/27 + 5i*sqrt(5142)/9)^(1/3));
    -(199 + 9*(5566699/729 + 25930i*sqrt(5142)/243)^(1/3) - 78*(2593/27 + 5i*sqrt(5142)/9)^(1/3) - 9i*sqrt(3)*(5566699/729 + 25930i*sqrt(5142)/243)^(1/3) + 199i*sqrt(3))/(18*(2593/27 + 5i*sqrt(5142)/9)^(1/3))
] = [0; 13.6572; 0.735878; -1.39303]
