Ax == λEx
A := [1, 2, 3; 2, 4, 6; 3, 6, 5]
(A - λE)*x == 0
|A| = 0
tr(A) = 10
# Собственное значение
# 1)
eigenvals(A) = [-1.7082; 0; 11.7082]
eigenvals(A) → [3*sqrt(5) + 5; 0; 5 - 3*sqrt(5)]
# сумма всех собственных значений=следу | произведение равно детерменанту, то есть нулю
# 2)
|A - λ*identity(3)| → 10*λ^2 - λ^3 + 20*λ
10*λ^2 - λ^3 + 20*λ == 0 solve → [0; 3*sqrt(5) + 5; 5 - 3*sqrt(5)]
[0; 3*sqrt(5) + 5; 5 - 3*sqrt(5)] = [0; 11.7082; -1.7082]
# Быстрые методы получения собственных векторов
# нормированные собственные вектора:
eigenvecs(A) = [0.316228, 0.894427, 0.316228; 0.632456, -0.447214, 0.632456; -0.707107, 0, 0.707107]
# 1)
eigenvecs(A) → [
    -2, (sqrt(5) - 3)/(3*sqrt(5) - 5), (sqrt(5) + 3)/(3*sqrt(5) + 5);
    1, (2*sqrt(5) - 6)/(3*sqrt(5) - 5), (2*sqrt(5) + 6)/(3*sqrt(5) + 5);
    0, 1, 1
]
# когда численно знак равно то порядок верен, когда символьно(стрелочка) то порядок случаен
# это можно проверить: | что соответсвует нулю
eigenvec(A, 0) = [-0.894427; 0.447214; 0]
eigenvec(A, 5 - 3*sqrt(5)) = [-0.316228; -0.632456; 0.707107]
# чтобы изменить кол-во знаков после запятой - формат-результат-число десятичных знаков
