a := [1; 2; 3]
b := [3; 4; 5]
a + b = [4; 6; 8]
a*b = 26
a×b = [-2; 4; -2]
a - b = [-2; -2; -2]
c := [16, 15, 14, 13; 12, 11, 10, 9; 8, 7, 6, 5; 4, 3, 2, 1]
d := [1, 2, 3, 4; 5, 6, 7, 8; 9, 10, 11, 12; 13, 14, 15, 16]
c + d = [17, 17, 17, 17; 17, 17, 17, 17; 17, 17, 17, 17; 17, 17, 17, 17]
c - d = [15, 13, 11, 9; 7, 5, 3, 1; -1, -3, -5, -7; -9, -11, -13, -15]
tr(c) = 34
c*d = [386, 444, 502, 560; 274, 316, 358, 400; 162, 188, 214, 240; 50, 60, 70, 80]
tr(d) = 34
x := c = [16, 15, 14, 13; 12, 11, 10, 9; 8, 7, 6, 5; 4, 3, 2, 1]
f := 3*x^2 - 2*x + 5 simplify → [1773, 1601, 1429, 1257; 1301, 1177, 1053, 929; 829, 753, 677, 601; 357, 329, 301, 273] = [1773, 1601, 1429, 1257; 1301, 1177, 1053, 929; 829, 753, 677, 601; 357, 329, 301, 273]
3*x^2 = [1800, 1626, 1452, 1278; 1320, 1194, 1068, 942; 840, 762, 684, 606; 360, 330, 300, 270]
2*x = [32, 30, 28, 26; 24, 22, 20, 18; 16, 14, 12, 10; 8, 6, 4, 2]
3*x^2 - 2*x = [1768, 1596, 1424, 1252; 1296, 1172, 1048, 924; 824, 748, 672, 596; 352, 324, 296, 268]
x := 1
y := 1
d := [1, 2, 3, 4; 5, 6, y, 8; 9, 10, 11, 12; 13, x, 15, 16]
c := [16, 15, V, 13; 12, 11, 10, 9; 8, U, 6, 5; 4, 3, 2, 1]  # error: Эта переменная не определена.
|c| expand → 336*U + 168*V - 24*U*V - 2352
rank(c) simplify → 4
c^-1 simplify → [
    -1/(3*V - 42), (26*U + 15*V - U*V - 294)/(24*(U - 7)*(V - 14)), -2/(3*(U - 7)), -(130*U + 55*V - 9*U*V - 798)/(24*(U - 7)*(V - 14));
    0, -1/(2*U - 14), 1/(U - 7), -1/(2*U - 14);
    1/(V - 14), -3/(2*(V - 14)), 0, 1/(2*(V - 14));
    -2/(3*(V - 14)), -(4*U/3 + V - U*V/6 - 7)/((U - 7)*(V - 14)), -1/(3*U - 21), 1/(6*U - 42) - (3*V - 40)/(6*V - 84)
]
a := [a1, a2; a3, a4]  # error: Эта переменная не определена.
b := [b1, b2; b3, b4]  # error: Эта переменная не определена.
(a + b)*(a - b) - a^2 + b^2 simplify → [a3*b2 - a2*b3, a2*b1 - a1*b2 - a2*b4 + a4*b2; a1*b3 - a3*b1 + a3*b4 - a4*b3, a2*b3 - a3*b2]
a*b - b*a simplify → [a2*b3 - a3*b2, a1*b2 - a2*b1 + a2*b4 - a4*b2; a3*b1 - a1*b3 - a3*b4 + a4*b3, a3*b2 - a2*b3]
a*b simplify → [a1*b1 + a2*b3, a1*b2 + a2*b4; a3*b1 + a4*b3, a3*b2 + a4*b4]
b*a simplify → [a1*b1 + a3*b2, a2*b1 + a4*b2; a1*b3 + a3*b4, a2*b3 + a4*b4]
a := [2, 4; 4, -2]
a*a = [20, 0; 0, 20]
