a11 := 1
a12 := 3
a13 := -1
a14 := 5
a21 := 3
a22 := 4
a23 := -2
a24 := 2
a31 := -3
a32 := 2
a33 := 1
a34 := 2
a41 := 1
a42 := 4
a43 := 5
a44 := -4
b1 := 5
b2 := 8
b3 := 2
b4 := 3
a11*x1 + a12*x2 + a13*x3 + a14*x4 == b1
a21*x1 + a22*x2 + a23*x3 + a24*x4 == b2
A := [a11, a12, a13, a14; a21, a22, a23, a24; a31, a32, a33, a34; a41, a42, a43, a44]
z := [x1; x2; x3; x4]  # error: Эта переменная не определена.
b := [b1; b2; b3; b4]
a31*x1 + a32*x2 + a33*x3 + a34*x4 == b3
a41*x1 + a42*x2 + a43*x3 + a44*x4 == b4
|A| = -348
# 1 метод
x_1 := lsolve(A, b) = [0.0402299; 1.62931; -0.833333; -0.152299]
# 2 метод
A^-1*A*x == b*A^-1
x_2 := A^-1*b = [0.0402299; 1.62931; -0.833333; -0.152299]
# 3 метод
z_j == |M(j)|/|A|
x_3_3 := det([a11, a12, b1, a14; a21, a22, b2, a24; a31, a32, b3, a34; a41, a42, b4, a44])/|A| = -0.833333
x_3_4 := det([a11, a12, a13, b1; a21, a22, a23, b2; a31, a32, a33, b3; a41, a42, a43, b4])/|A| = -0.152299
x_3_1 := det([b1, a12, a13, a14; b2, a22, a23, a24; b3, a32, a33, a34; b4, a42, a43, a44])/|A| = 0.0402299
x_3_2 := det([a11, b1, a13, a14; a21, b2, a23, a24; a31, b3, a33, a34; a41, b4, a43, a44])/|A| = 1.62931
x_3_1 = 0.0402299
x_3_2 = 1.62931
x_3_3 = -0.833333
x_3_4 = -0.152299
# 4 метод
Ar := augment(A, b) = [1, 3, -1, 5, 5; 3, 4, -2, 2, 8; -3, 2, 1, 2, 2; 1, 4, 5, -4, 3]
Ag := rref(Ar) = [1, 0, 0, 0, 0.0402299; 0, 1, 0, 0, 1.62931; 0, 0, 1, 0, -0.833333; 0, 0, 0, 1, -0.152299]
x_4 := submatrix(Ag, 0, 3, 4, 4) = [0.0402299; 1.62931; -0.833333; -0.152299]
