A(a) := [a, 9, 2; 6, 3, 4; 8, 9, 2]
detA(a) := |A(a)|
b := 0
Given
detA(b) == 0
a := Find(b) = 8
detA(8) = 0
A(a) = [8, 9, 2; 6, 3, 4; 8, 9, 2]
transpose(A(a)) = [8, 6, 8; 9, 3, 9; 2, 4, 2]
a1 := submatrix(transpose(A(a)), 0, 0, 0, 2) = [8, 6, 8]
a2 := submatrix(transpose(A(a)), 1, 1, 0, 2) = [9, 3, 9]
a3 := submatrix(transpose(A(a)), 2, 2, 0, 2) = [2, 4, 2]
k1 := 0
k2 := 0
Given
a3 + k1*a2 + k2*a1 == 0
Find(k1, k2) = [0.666667; -1]
a3 + 0.666666666*a2 - a1 = [-6e-9, -2e-9, -6e-9]
