x1 := 1
x2 := 1
x3 := 2
x4 := 3
# расширенная матрица
Given
x1 - x2 + x3 - x4 == 0
x1 + x2 + 2*x3 + 3*x4 == 0
b := [0; 0; 0; 0]
A := [1, -1, 1, -1; 1, 1, 2, 3; 2, 4, 5, 10; 2, -4, 1, -6]
2*x1 + 4*x2 + 5*x3 + 10*x4 == 0
B := augment(A, b)
B = [1, -1, 1, -1, 0; 1, 1, 2, 3, 0; 2, 4, 5, 10, 0; 2, -4, 1, -6, 0]
2*x1 - 4*x2 + x3 - 6*x4 == 0
rank(B) = 2
x := Find(x1, x2, x3, x4)
|A| = 0  # если ее ранг больше, чем ранг матрицы, то решения не будет
x = [0; 0; 0; 0]
lsolve(A, b) =  # error: Это вычисление не приближается к решению.
rank(A) = 2
x1 - x2 == -x3 + x4
x1 + x2 == -2*x3 - 3*x4
x1 := -3/2*x3 - x4
2*x1 + 4*x2 == -5*x3 - 10*x4
y1 := [-3/2; -1/2; 1; 0]
y2 := [-1; -2; 0; 1]
2*x1 - 4*x2 == -x3 + 6*x4
x2 := -1/2*x3 - 2*x4
x3 := x3
[x1; x2; x3; x4] := C1*y1 + C2*y2  # error: Эта переменная не определена.
x4 := x4
# Превращаем в неоднородное уравнение
x1 - x2 + x3 - x4 == 4
x1 + x2 + 2*x3 + 3*x4 == 8
2*x1 + 4*x2 + 5*x3 + 10*x4 == 20
2*x1 - 4*x2 + x3 - 6*x4 == 4
# Берем два независимых
x1 - x2 == -x3 + x4 + 4
x1 + x2 == -2*x3 - 3*x4 + 8
# ранг матрицы = 3
# все 4 метода
# составить свободный вектор
# чтобы было решение и не было решения
