a11 := 1
a21 := 5
a31 := 8
a41 := 1
a12 := 2
b1 := 1
a22 := 6
a32 := 7
a42 := 3
a13 := 3
b2 := 3
a23 := 7
a33 := 6
a43 := 2
a14 := 4
b3 := 2
a24 := 8
a34 := 3
a44 := 4
b4 := 4
a11*x1 + a12*x2 + a13*x3 + a14*x4 == b1
a21*x1 + a22*x2 + a23*x3 + a24*x4 == b2
A := [a11, a12, a13, a14; a21, a22, a23, a24; a31, a32, a33, a34; a41, a42, a43, a44]
a31*x1 + a32*x2 + a33*x3 + a34*x4 == b3
a41*x1 + a42*x2 + a43*x3 + a44*x4 == b4
z := [x; y]  # error: Эта переменная не определена.
b := [b1; b2; b3; b4]
# 1 способ - способ маткада | Метод№3 | Метод №4
# Метод №2 | формула Крамера | метод гаусса
detA := |A|  # обратная матрица
detA = 24
A*x_2 == b
z_j == |M(j)|/|A|
Ar := augment(A, b)
x_2 := A^-1*b
x_1 := lsolve(A, b)
Ar = [1, 2, 3, 4, 1; 5, 6, 7, 8, 3; 8, 7, 6, 3, 2; 1, 3, 2, 4, 4]
x_2 = [-0.0833333; 1.41667; -1.58333; 0.75]
Ag := rref(Ar)
x_3_1 := det([b1, a12, a13, a14; b2, a22, a23, a24; b3, a32, a33, a34; b4, a42, a43, a44])/|A|
x_1 = [-0.0833333; 1.41667; -1.58333; 0.75]
Ag = [1, 0, 0, 0, -0.0833333; 0, 1, 0, 0, 1.41667; 0, 0, 1, 0, -1.58333; 0, 0, 0, 1, 0.75]
x_4 := submatrix(Ag, 0, 3, 4, 4)
x_3_2 := det([a11, b1, a13, a14; a21, b2, a23, a24; a31, b3, a33, a34; a41, b4, a43, a44])/|A|
x_4 = [-0.0833333; 1.41667; -1.58333; 0.75]
x_3_3 := det([a11, a12, b1, a14; a21, a22, b2, a24; a31, a32, b3, a34; a41, a42, b4, a44])/|A|
x_3_4 := det([a11, a12, a13, b1; a21, a22, a23, b2; a31, a32, a33, b3; a41, a42, a43, b4])/|A|
x_3_1 = -0.0833333
x_3_2 = 1.41667
x_3_3 = -1.58333
x_3_4 = 0.75
B := [3, 4, 5; 6, 7, 8; 9, 6, 1]
E := [1, 0, 0; 0, 1, 0; 0, 0, 1]
A := [1, 2, 3; 4, 8, 6; 7, 8, 9]
detA := |A|
detA = -36
A*B - B*A = [-12, -42, -54; 24, -24, -42; 110, 64, 36]
A*E - E*A = [0, 0, 0; 0, 0, 0; 0, 0, 0]
A*A^-1 - A^-1*A = [0, 0, -5.55112e-17; 0, 2.22045e-16, 0; 0, 0, -2.22045e-16]
C2(c1) := [1, 2, 3; 6, c1, 4; 7, 6, 2]
detC2(c1) := |C2(c1)|
b := 0
Given
detC2(b) == 0
Find(b) = 6.10526
detC2(6.105) = 0.005
C2(6.105) = [1, 2, 3; 6, 6.105, 4; 7, 6, 2]
transpose(C2(6.105)) = [1, 6, 7; 2, 6.105, 6; 3, 4, 2]
a1 := submatrix(transpose(C2(6.105)), 0, 0, 0, 2) = [1, 6, 7]
a2 := submatrix(transpose(C2(6.105)), 1, 1, 0, 2) = [2, 6.105, 6]
a3 := submatrix(transpose(C2(6.105)), 2, 2, 0, 2) = [3, 4, 2]
k1 := 0
k2 := 0
Given
a3 - k1*a2 - k2*a1 == 0
Find(k1, k2) = [2.37518; -1.75012]
a3 - 2.375*a2 + 1.75*a1 = [0, 0.000625, 0]
