# 1. Given - find
x1 := 0
x2 := 0
x3 := 0
Given
1*x1 + 2*x2 + 3*x3 == 3
3*x1 + 2*x2 - x3 == 1
x1 - x2 + x3 == 2
x := Find(x1, x2, x3)
x = [0.818182; -0.272727; 0.909091]
# 2. Матричный способ
# в матрицу вставляем коэфициенты уравнений
a := [1, 2, 3; 3, 2, -1; 1, -1, 1]
b := [3; 1; 2]  # в вектор - то, чему равны уравнения
y1 := lsolve(a, b)
y1 = [0.818182; -0.272727; 0.909091]
# 3. Матричный способ номер 2, обратная матрица
a = [1, 2, 3; 3, 2, -1; 1, -1, 1]
a^-1 = [-0.0454545, 0.227273, 0.363636; 0.181818, 0.0909091, -0.454545; 0.227273, -0.136364, 0.181818]
z := a^-1*b
z = [0.818182; -0.272727; 0.909091]
