v := [2; 3; 4]
[1, 4, 5; 2, 6, 7; 3, 9, 8]
[1; 2; -1] + [-1; 3; 2] = [0; 5; 1]
v*2 = [4; 6; 8]
v + [0; -1; 1] = [2; 2; 5]
a[0] := 1
a[1] := 5
a[2] := -3
a[5] := 8
a = [1; 5; -3; 0; 0; 8]
v[0] = 2
2*[2; 3; 4] = [4; 6; 8]
v[2] = 4
v[0] := 3
v = [3; 3; 4]
m[0, 0] := 1
m[1, 0] := 2
m[0, 1] := 3
m[1, 2] := 6
m = [1, 3, 0; 2, 0, 6]
m[1, 2] = 6
m[:, 0] = [1; 2]
m[:, 1] := [-3; 9]
m = [1, -3, 0; 2, 9, 6]
transpose(m) = [1, 2; -3, 9; 0, 6]
v := m[:, 1]
v = [-3; 9]
b := transpose(transpose(m)[:, 0])
b = [1, -3, 0]
M1 := [0!; .2; .1; 3]
M2 := [2^2, 7; 5, 8; 3!, sqrt(81)]
M2 = [4, 7; 5, 8; 6, 9]
M1 = [1; 0.2; 0.1; 3]
