# Система уравнений 4х4
# детерминант не ноль, след не ноль ранк равен четырем - проверить
# обнулить детерминант
# 1. Способ
x1 := 0
x2 := 0
x3 := 0
x4 := 0
Given
3*x1 + 2*x2 - 1*x3 - 3*x4 == 4
2*x1 - 1*x2 - 2*x3 + 1*x4 == 1
1*x1 + 4*x2 + 3*x3 + 1*x4 == 3
5*x1 - 3*x2 + 2*x3 + 5*x4 == 5
x := Find(x1, x2, x3, x4)
x = [1.1457; 0.182119; 0.44702; -0.215232]
# 2. Матричный способ
b := [4; 1; 3; 5]
a := [3, 2, -1, -3; 2, -1, -2, 1; 1, 4, 3, 1; 5, -3, 2, 5]
|a| = 302
rank(a) = 4
y1 := lsolve(a, b)
tr(a) = 10
y1 = [1.1457; 0.182119; 0.44702; -0.215232]
# 3. Матричный способ номер 2, обратная матрица
a = [3, 2, -1, -3; 2, -1, -2, 1; 1, 4, 3, 1; 5, -3, 2, 5]
a^-1 = [
    0.165563, 0.00662252, -0.00662252, 0.0993377;
    -0.0430464, 0.258278, 0.241722, -0.125828;
    0.0761589, -0.456954, -0.0430464, 0.145695;
    -0.221854, 0.331126, 0.168874, -0.0331126
]
z := a^-1*b
z = [1.1457; 0.182119; 0.44702; -0.215232]
Проверка
x = [1.1457; 0.182119; 0.44702; -0.215232]
y1 = [1.1457; 0.182119; 0.44702; -0.215232]
z = [1.1457; 0.182119; 0.44702; -0.215232]
